# AguaClara Water Treatment Plants
# Automated Design
# Add variable descriptions next to every varible so it is easy to interpret what this all means.
# Design References
# [reference: BasicInputs1Sed1Bay.xmcd]
# Use BasicClientInputs and ExpertClientInputs when this is run by LabVIEW.
# Use BasicInputs and ExpertInputs to use the program in MathCAD
# Change the reference by
# - right clicking
# - select properties
# - reference tab
# - type in the correct file name
# [reference: ExpertInputs.xmcd]
# [reference: DesignAssumptions.xmcd]
# [reference: MathFunctions.xmcd]
# [reference: PipeDatabase.xmcd]
# [reference: MinorLossCoefficients.xmcd]
# [reference: FluidsFunctions.xmcd]
# [reference: Sedimentation Tank.xmcd]
# [reference: Floc Hopper.xmcd]
# [reference: FCM.xmcd]
# [reference: Flocculator 3.xmcd]
# [reference: RapidMixer.xmcd]
# [reference: Materials List.xmcd]
# [reference: EntranceTankDim.xmcd]
# Sed Tanks and Slopes:
B_SedPort = 3.68418 cm  # Height of the narrowest part of the manifold ports
N_SedTanks = 1
W_SedPort = 3.68418 cm
H_SedBetween = 0 cm  # Distance from the top of the inlet manifold to the bottom of the ledge supporting the lamella frame
A_SedPort = 13.5732 cm^2  # Port Area
L_Sed = 6.70807 m
W_SedSludgeFlat = 5 cm  # Distance between tips of manifold plates (space alloted for the drain holes
N_SedBays = 1  # Number of bays of inlet manifolds in each sed tank
AN_SedTopInlet = 60 deg  # Angle of the top of the inlet manifold
L_SedPort = 4.25412 cm  # Length of the port through which water exits the inlet manifold
AN_SedBottom = 10 deg  # Angle of the bottom of inlet manifold
W_SedSlopePlate = 30 cm  # Width of ferrous cement plates in whice one manifold port is cut
Q_SedBay = 5 L/s
W_SedBayActual = 0.92 m
L_SedSlopeManifold = 0.800718 m  # This is the extra distance between the last slope and the wall
# Sedimentation Tank Sludge Drain:
N_SedSludgeOrifices = 44  # per cell
Ti_SludgeDrain = 30 min  # Tank Drain time
W_SedSludge = 12.6303 cm  # Width of the sludge channel
B_SedSludgeOrifices = 15 cm  # Distance center to center between drain orifices
H_SedSludge = 6.31516 cm  # Depth of the sludge channel
T_SedSludge = 7.4641 cm
T_SedSludge = 7.4641 cm
# Thickness of the plate topping the sludge channel
# through which drain holes are formed
W_SedDrainCover = 19.2376 cm
D_SedSludgeOrifice = 0.0127 m  # Diameter of drain orifices
W_SedInletBottom = 0.363812 m
N_SedSludgeOrifices = 44
ND_SedSludgeValve = 3 in
# Sedimentation Tank Dimensions:
Z_SedSludge = 0.137793 m  # Height from 0 of the top of the sludge drain
H_SedBottomSlope = 0.0647689 m  # Height of the bottom slope
H_SedTopSlope = 0.693442 m  # Height of the top of the inlet manifold
Z_SedSlopes = 0.831235 m  # Height from 0 of the top of the inlet manifold
W_Sed = 0.92 m  # Total tank wall height
L_Sed = 6.70807 m  # Total tank length
# Inlet Channel:
HW_InletChannel = 0.199318 m  # Width of the drop chimneys connecting channel to sed inlet manifolds
W_InletChannel = 0.205338 m  # length of drop chimmneys
L_Channel = 1.22 m
W_SedManifoldEntrance = 0.103738 m
L_SedManifoldEntrance = 0.211412 m
H_SedManifoldPort = 0.233612 m  # Ports at bottom of inlet chimney are set to be triangles
W_SedManifoldPort = 0.298759 m
N_SedInletPipes = 2  # per sed bay
H_InletChannel = 0.299318 m
# Sedimentation Tank Effluent Launder:
N_SedLaunderOrifices = 122  # Number of orifices per launder
Q_SedLaunderOrifices = 2.04918e-5 m^3/s  # More Launder Dimensions
ND_SedLaunder = 4 in
B_SedLaunderOrifices = 0.1 m  # Center to center launder spacing
L_SedLaunder = 6.09874 m
# Exit Channel:
D_SedLaunderOrifice = 0.25 in
W_ExitChannel = 0.254 m
H_ExitChannel = 0.299318 m
L_ExitChannel = 1.22 m
H_PltWeir = 0.127042 m  # height of the weir carrying water to the distribution tank
HW_ExitChannel = 0.159318 m  # water height in exit channel from 0
# Lamella:
L_SedPlate = 0.332509 m
B_SedPlate = 1.97993 cm  # center to center distance between lamella
S_SedPlate = 1.7 cm  # spacing between lamella
N_SedPlates = 254  # Number of Sed Plates per Sedimentation Tank Bay.
AN_SedPlate = 60 deg
ZW_ExitChannel = 1.40002 m
V_SedC = 10.1145 m/day
L_SedActive = 4.9026 m
T
V_SedUp = 70 m/day
Z_SedLaunder = 1.34287 m
H_SedPlate = 0.287961 m
H_SedAbove = 0.1543 m  # Height of water needed above the lamella
N_SedPlates = 254
HW_Sed = 1.44002 m
H_Sed = 1.54002 m
Z_Mp = 1.2407 m
N_SedPorts = 21
H_SedBayDivider = 0.901235 m
W_SedSlopePlateRemaining = 0.408075 m
W_SedBayDivider = 0.15 m
# Sedimentation Tank Floc Hopper:
A_FlocHopper = 1.5552 m^2
L_FlocHopper = 1.69043 m  # Length of the hopper cement plate
L_FlocHopperOffset = 0.166255 m  # distance from the edge of the channel to the bottom of the first lamella (collection distance)
W_FlocHopper = 0.92 m  # width of the hopper set within each bay
# Flow Controller:
# [reference: FCM.xmcd]
N_Fcm = 1
ID_FcmTube = 3.175 mm
ID_FcmTube = 0.125 in
L_FcmTube = 125.479 cm
Q_FcmTubeMax = 225 mL/min
HL_FcmValve = 9.40555 cm
# Flocculator: | Look at Flocculator Positioning arrays
# [reference: Flocculation Energy Dissapation.xmcd]
W_FlocChannel = 0.45 m
# Fill last channel with bafffles from last channel
# Fix port width to be based on energy dissipation in that channel
ED_Floc = [20; 2] mW/kg
# Adjust spacing after the number of baffles per channel is known.
# Check the residence time of the flocculator should be at least 20minutes
HW_FlocEnd = 1.44002 m
X_FlocBaffles = [
    0.0949615, 0.14238, 0.14238;
    0.229923, 0.324761, 0.324761;
    0.364884, 0.507141, 0.507141;
    0.499846, 0.689522, 0.689522;
    0.634807, 0.871902, 0.871902;
    0.769769, 1.05428, 1.05428;
    0.90473, 1.23666, 1.23666;
    1.03969, 1.41904, 1.41904;
    1.17465, 1.60142, 1.60142;
    1.30961, 1.7838, 1.7838
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] m
L_FlocBaffles = [
    1.6296, 1.58218, 1.58218;
    1.34505, 1.29764, 1.29764;
    1.6296, 1.58218, 1.58218;
    1.34505, 1.29764, 1.29764;
    1.6296, 1.58218, 1.58218;
    1.34505, 1.29764, 1.29764;
    1.6296, 1.58218, 1.58218;
    1.34505, 1.29764, 1.29764;
    1.6296, 1.58218, 1.58218;
    1.34505, 1.29764, 1.29764
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] m
Z_FlocBaffles = [
    0, 0, 0;
    0.0949615, 0.14238, 0.14238;
    0, 0, 0;
    0.0949615, 0.14238, 0.14238;
    0, 0, 0;
    0.0949615, 0.14238, 0.14238;
    0, 0, 0;
    0.0949615, 0.14238, 0.14238;
    0, 0, 0;
    0.0949615, 0.14238, 0.14238
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] m
N_FlocChannels = 3
L_FlocTank = 20.1242 m
HL_Floc = 18.4542 cm
HW_FlocStart = 1.62456 m
S_FlocBaffle = [9.49615; 14.238; 14.238] cm
B_FlocBaffle = [13.4961; 18.238; 18.238] cm
N_FlocChannelBaffles = [49; 36; 36]
W_FlocPort = [0.0449615; 0.0923804; 0.0923804] m
HL_FlocChannels = [11.2576; 3.59827; 3.59827] cm
L_FlocBaffleLower = [1.34505; 1.29764; 1.29764] m
L_FlocBaffleUpper = [1.6296; 1.58218; 1.58218] m
H_FlocPort = [0.950428; 0.693558; 0.693558] m
Ti_Floc = 43.4688 min  # residence time of the flocculator
N_FlocBaffles = 121
# Rapid Mix Unit and Entrance Tank:
# [reference: EntranceTankDim.xmcd]
L_Et = 0.785584 m
W_Et = 0.785584 m
H_Et = 2.02456 m  # Height of Entrance Tank Orifice
W_EtOrifice[30] = 0.031 m
L_trueET[30] = 0.129264 m  # Length of Entrance Tank Orifice
Pi_EtFlow[30] = 0.278388  # Ratio of the minimum flow divided by the maximum flow through the plant.
L_FlocEntryOrifice = 45 cm  # Length of orifice entering into flocculator from Rapid Mix Unit
W_FlocEntryOrifice = 1.59381 cm  # Height of orifice entering into flocculator
ED_Diffusion =  # error: This variable is undefined.  # Minimum Energy Dissipation needed
HL_FlocEntryOrifice = 3.69804 cm  # Head loss caused by entering flocculation tank.
A_FlocEntry = 0.00717213 m^2
A_EtOrifice = 40.0718 cm^2
HW_EtTotal =  # error  # Total Height of water at beginning of rapid mix unit
HW_Channel2 =  # error  # Height of water at the back of the entrance tank channel (from channel bottom)
HW_EtChannel = 4.26601 cm  # Height of Waterfall into flocculator
W_EtChannel = 9.49615 cm  # Widt of entrance tank channel
Vol_Stock = 405 L  # Volume of chemical stock tanks
ZW_ExitChannel = 1.40002 m  # Water Level at the end of the plant in the exit channel and exit channel box
HW_Sed = 1.44002 m
HW_FlocStart = 1.62456 m  # Water level at the beginning of the floc tank
HL_Floc = 18.4542 cm  # just for ref. the head loss throught the floc tank
HW_EtTotal =  # error  # Height of the water in the entrance channel
# Materials List:
# [reference: Materials List.xmcd]
L_LaunderPipe = 6.35531 m
N_Launders = 18
L_LaunderPipeTotal = 114.396 m
N_Valves = 9
N_LaunderCouplings = 18
N_ValveCouplings = 9
N_SedPlatesTotal = 2331
N_SedPlatesPerSheet = 10
N_SedPlateSheets = 234
N_PipeSedPlateStand =  # error
A_SedTank = 68.8503 m^2
# [reference: AutoCADMasterProgram.xmcd]
# AutoCAD References
AC_SedTank = [
    "_-view o t"; "-layer m tank"; "c t 132,132,132"; "tank"; "  "; "_-view o t _zoom w 0.16,-0.16,0 -7.61342,2.92,1.54253 _box 0,0,0 -7.45342,2.76,1.54253 _box 0.15,-0.15,-0.15 -7.60342,2.91,1.54253 _subtract 0.15,-0.15,-0.15  0,0,0 "; "-layer s 0"; "  "; "-layer f tank"; "  "
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]
AC_EntranceTank = [
    "-layer m entrancetank";
    "c t 214,214,214";
    "entrancetank";
    "  ";
    "_-view o t _zoom w 0.16,14.51692,0 -2.64424,17.32116,2.12329 _box 0,14.67692,0 -2.48424,17.16116,2.12329 _box 0.15,14.52692,-0.15 -2.63424,17.31116,2.12329 _subtract 0.15,14.52692,-0.15  0,14.67692,0 ";
    "-layer s 0";
    "  ";
    "-layer f entrancetank";
    "  ";
    "-layer s entrancetank";
    "  ";
    "_box -2.48424,14.52692,2.07329 -2.27446,14.67692,2.12329";
    "-layer s 0";
    "  ";
    "-layer t entrancetank";
    "  ";
    "_-view o t";
    "_subtract 0.15,14.67692,0  -2.48424,14.52692,2.07329 ";
    "-layer f entrancetank";
    "  "
]
AC_FlocTank = [
    "-layer m floctank"; "c t 91,91,91"; "floctank"; "  "; "_-view o t _zoom w 0.16,8.57,0 -7.61342,14.68692,1.82329 _box 0,8.73,0 -7.45342,14.52692,1.82329 _box 0.15,8.58,-0.15 -7.60342,14.67692,1.82329 _subtract 0.15,8.58,-0.15  0,8.73,0 "; "-layer s 0"; "  "; "-layer f floctank"; "  "; "-layer m floctankwall"
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]
